// COMSOL Multiphysics 4.3.2.189 model "PPLATE_2.mph"
// Outline of the model tree

Parameters
  W = 200[mm]
  b = 1[mm]
  U = 1[V]
  I = 1[A]

Probes
  dom1: Domain "Domain Probe 1" on all domains | type = integral; expr = es.We; table = tbl1
  dom2: Domain "Domain Probe 2" on all domains | type = integral; expr = mf.Wm; table = tbl1

Geometry
  geom1 "Geometry 1" (2D, length unit m)
    r1: Rectangle | base = center; size = {1, 1}
    r2: Rectangle | base = center; size = {W, b}
    r3: Rectangle | base = center; size = {W, b}
    dif1: Difference | input = r1; input2 = r3
    fin: Finalize "Form Union"

Materials
  mat1 "Air" on all domains
    def "Basic"
      relpermeability = 1
      relpermittivity = 1
      dynamicviscosity = eta(T[1/K])[Pa*s]
      ratioofspecificheat = 1.4
      electricconductivity = 0[S/m]
      heatcapacity = Cp(T[1/K])[J/(kg*K)]
      density = rho(pA[1/Pa],T[1/K])[kg/m^3]
      thermalconductivity = k(T[1/K])[W/(m*K)]
      soundspeed = cs(T[1/K])[m/s]
      eta: Piecewise | arg = T; extrap = constant; pieces = {200.0, 1600.0, -8.38278E-7+8.35717342E-8*T^1-7.69429583E-11*T^2+4.6437266E-14*T^3-1.06585607E-17*T^4}
      Cp: Piecewise | arg = T; extrap = constant; pieces = {200.0, 1600.0, 1047.63657-0.372589265*T^1+9.45304214E-4*T^2-6.02409443E-7*T^3+1.2858961E-10*T^4}
      rho: Analytic | expr = pA*0.02897/8.314/T; args = {pA, T}; dermethod = manual; argders = {{pA, d(pA*0.02897/8.314/T,pA)}, {T, d(pA*0.02897/8.314/T,T)}}
      k: Piecewise | arg = T; extrap = constant; pieces = {200.0, 1600.0, -0.00227583562+1.15480022E-4*T^1-7.90252856E-8*T^2+4.11702505E-11*T^3-7.43864331E-15*T^4}
      cs: Analytic | expr = sqrt(1.4*287*T); args = T; dermethod = manual; argders = {T, d(sqrt(1.4*287*T),T)}
    RefractiveIndex
      n = 1
      ki = 0

Physics
  mf: InductionCurrents "Magnetic Fields" on all domains
    dependent variable A = {Ax, Ay, Az}
    al1: AmperesLaw "Ampère's Law 1" (default)
    mi1: MagneticInsulation (default)
    init1: init "Initial Values 1" (default)
    scu1: SurfaceCurrent on boundaries 6 | Js0 = {0, 0, I/W}
    mp1: MagneticPotential on boundaries 5
  es: Electrostatics on all domains
    dependent variable V
    ccn1: ChargeConservation (default)
    zc1: ZeroCharge (default)
    init1: init "Initial Values 1" (default)
    pot1: ElectricPotential on boundaries 6
    pot2: ElectricPotential on boundaries 5 | V0 = U

Mesh
  mesh1 "Mesh 1" (physics-controlled)
    size: MeshSizeDefault | hauto = 5

Studies
  std1 "Study 1"
    param: Parametric "Parametric Sweep" | pname = b; plistarr = range(1[mm],5[mm],200[mm])
    stat: Stationary

Solver configurations
  sol1 "Solver 1" (study std1)
    v1: Variables "Dependent Variables 1"
    s1: Stationary "Stationary Solver 1"
      dDef: Direct
      fc1: FullyCoupled
  sol2 "Parametric 2" (study std1)

Datasets
  dset1: Solution | solution = sol1
  dset2: Solution "Probe Solution 2" | solution = sol1
  int1: Integral "Domain Probe 2" on domains 1, 2 | data = dset2
  dset3: Solution | solution = sol2
  int2: Integral "Domain Probe 1" on domains 1, 2 | data = dset2

Derived values
  pev1: EvalPoint "Domain Probe 2" | data = int1; table = tbl1; expr = mf.Wm
  pev2: EvalPoint "Domain Probe 1" | data = int2; table = tbl1; expr = es.We

Tables
  tbl1: Table "Probe Table 1"
    b | Magnetic energy density (J/m), Domain Probe 2 | Electric energy density (J/m), Domain Probe 1
    0.001 | 3.09515e-09 | 8.97709e-10
    0.006 | 1.75501e-08 | 1.57447e-10
    0.011 | 3.06662e-08 | 8.95037e-11
    0.016 | 4.26712e-08 | 6.38749e-11
    0.021 | 5.37569e-08 | 5.02895e-11
    0.026 | 6.39135e-08 | 4.20051e-11
    0.031 | 7.34732e-08 | 3.6205e-11
    0.036 | 8.22949e-08 | 3.20396e-11
    0.041 | 9.04034e-08 | 2.89583e-11
    0.046 | 9.81147e-08 | 2.64374e-11
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
Plots
  pg1: PlotGroup2D "Magnetic Flux Density Norm (mf)" | data = dset1
    surf1: Surface | expr = mf.normB
  pg2: PlotGroup2D "Electric Potential (es)" | data = dset1
    surf1: Surface | expr = V
  pg3: PlotGroup1D "Probe 1D Plot Group 3"
    tblp1: Table "Probe Table Graph 1" | table = tbl1; plotcolumns = 3
  pg4: PlotGroup2D "Magnetic Flux Density Norm (mf) 1" | data = dset3
    surf1: Surface | expr = V
  pg5: PlotGroup2D "Electric Potential (es) 1" | data = dset3
    surf1: Surface | expr = V

Exports
  tbl1: Table | table = tbl1; filename = C:\Users\SSS\Documents\TTY_WTL\PPLATE2.txt