// COMSOL Multiphysics 4.3.2.189 model "SiS.mph"
// Outline of the model tree

Parameters
  d = 1[mm]
  H = 1[mm]
  I = 1[A]
  U = 1[V]

Probes
  dom1: Domain "Domain Probe 1" on all domains | expr = sqrt(mf.Wm/es.We); table = tbl1

Geometry
  geom1 "Geometry 1" (2D, length unit m)
    r1: Rectangle | pos = {-1.5, 0}; size = {6, 6}
    c1: Circle | pos = {0, H}; r = d/2
    dif1: Difference | input = r1; input2 = c1
    fin: Finalize "Form Union"

Materials
  mat1 "Air" on all domains
    def "Basic"
      relpermeability = 1
      relpermittivity = 1
      dynamicviscosity = eta(T[1/K])[Pa*s]
      ratioofspecificheat = 1.4
      electricconductivity = 0[S/m]
      heatcapacity = Cp(T[1/K])[J/(kg*K)]
      density = rho(pA[1/Pa],T[1/K])[kg/m^3]
      thermalconductivity = k(T[1/K])[W/(m*K)]
      soundspeed = cs(T[1/K])[m/s]
      eta: Piecewise | arg = T; extrap = constant; pieces = {200.0, 1600.0, -8.38278E-7+8.35717342E-8*T^1-7.69429583E-11*T^2+4.6437266E-14*T^3-1.06585607E-17*T^4}
      Cp: Piecewise | arg = T; extrap = constant; pieces = {200.0, 1600.0, 1047.63657-0.372589265*T^1+9.45304214E-4*T^2-6.02409443E-7*T^3+1.2858961E-10*T^4}
      rho: Analytic | expr = pA*0.02897/8.314/T; args = {pA, T}; dermethod = manual; argders = {{pA, d(pA*0.02897/8.314/T,pA)}, {T, d(pA*0.02897/8.314/T,T)}}
      k: Piecewise | arg = T; extrap = constant; pieces = {200.0, 1600.0, -0.00227583562+1.15480022E-4*T^1-7.90252856E-8*T^2+4.11702505E-11*T^3-7.43864331E-15*T^4}
      cs: Analytic | expr = sqrt(1.4*287*T); args = T; dermethod = manual; argders = {T, d(sqrt(1.4*287*T),T)}
    RefractiveIndex
      n = 1
      ki = 0

Physics
  es: Electrostatics on all domains
    dependent variable V
    ccn1: ChargeConservation (default)
    zc1: ZeroCharge (default)
    init1: init "Initial Values 1" (default)
    pot1: ElectricPotential on boundaries 2 | V0 = U
    pot2: ElectricPotential on boundaries 5-8
  mf: InductionCurrents "Magnetic Fields" on all domains
    dependent variable A = {Ax, Ay, Az}
    al1: AmperesLaw "Ampère's Law 1" (default)
    mi1: MagneticInsulation (default)
    init1: init "Initial Values 1" (default)
    scu1: SurfaceCurrent on boundaries 5-8 | Js0 = {0, 0, I/(pi*d)}
    mp1: MagneticPotential on boundaries 2

Mesh
  mesh1 "Mesh 1" (physics-controlled)
    size: MeshSizeDefault | hauto = 5

Studies
  std1 "Study 1"
    param: Parametric "Parametric Sweep" | pname = H; plistarr = range(1[mm],10[mm],200[mm])
    stat: Stationary

Solver configurations
  sol1 "Solver 1" (study std1)
    v1: Variables "Dependent Variables 1"
    s1: Stationary "Stationary Solver 1"
      dDef: Direct
      fc1: FullyCoupled
  sol2 "Parametric 2" (study std1)

Datasets
  dset2: Solution | solution = sol1
  dset3: Solution | solution = sol2
  dset4: Solution "Probe Solution 4" | solution = sol1
  avh1: Average "Domain Probe 1" on domains 1 | data = dset4

Derived values
  pev1: EvalPoint "Domain Probe 1" | data = avh1; table = tbl1; expr = sqrt(mf.Wm/es.We)

Tables
  tbl1: Table "Probe Table 1"
    H | sqrt(mf.Wm/es.We) (1), Domain Probe 1
    0.001 | 85.246
    0.011 | 236.56
    0.021 | 278.763
    0.031 | 303.266
    0.041 | 320.792
    0.051 | 334.579
    0.061 | 345.892
    0.071 | 355.371
    0.081 | 363.727
    0.091 | 371.056
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
Plots
  pg1: PlotGroup1D "Probe 1D Plot Group 1"
    tblp1: Table "Probe Table Graph 1" | table = tbl1; plotcolumns = 2
  pg2: PlotGroup2D "Electric Potential (es)" | data = dset3
    surf1: Surface | expr = es.We/mf.Wm
  pg3: PlotGroup2D "Magnetic Flux Density Norm (mf)" | data = dset3
    surf1: Surface | expr = mf.normB

Exports
  tbl1: Table | table = tbl1; filename = /home/alexey/Documents/TTY/Transmission Lines & Waveguides/Study/WOFPB.txt