// COMSOL Multiphysics 4.3.2.189 model "WOFP.mph"
// Outline of the model tree

Parameters
  d = 1[mm]
  H = 2[mm]
  I = 1[A]
  U = 1[V]

Probes
  dom1: Domain "Domain Probe 1" on all domains | type = integral; expr = es.We; table = tbl1
  dom2: Domain "Domain Probe 2" on all domains | type = integral; expr = mf.Wm; table = tbl1

Geometry
  geom1 "Geometry 1" (2D, length unit m)
    r1: Rectangle | pos = {-1.5, 0}; base = corner; size = {3, 1}
    c1: Circle | pos = {0, H}; r = d/2
    dif1: Difference | input = r1; input2 = c1
    fin: Finalize "Form Union"

Materials
  mat1 "Air" on all domains
    def "Basic"
      relpermeability = 1
      relpermittivity = 1
      dynamicviscosity = eta(T[1/K])[Pa*s]
      ratioofspecificheat = 1.4
      electricconductivity = 0[S/m]
      heatcapacity = Cp(T[1/K])[J/(kg*K)]
      density = rho(pA[1/Pa],T[1/K])[kg/m^3]
      thermalconductivity = k(T[1/K])[W/(m*K)]
      soundspeed = cs(T[1/K])[m/s]
      eta: Piecewise | arg = T; extrap = constant; pieces = {200.0, 1600.0, -8.38278E-7+8.35717342E-8*T^1-7.69429583E-11*T^2+4.6437266E-14*T^3-1.06585607E-17*T^4}
      Cp: Piecewise | arg = T; extrap = constant; pieces = {200.0, 1600.0, 1047.63657-0.372589265*T^1+9.45304214E-4*T^2-6.02409443E-7*T^3+1.2858961E-10*T^4}
      rho: Analytic | expr = pA*0.02897/8.314/T; args = {pA, T}; dermethod = manual; argders = {{pA, d(pA*0.02897/8.314/T,pA)}, {T, d(pA*0.02897/8.314/T,T)}}
      k: Piecewise | arg = T; extrap = constant; pieces = {200.0, 1600.0, -0.00227583562+1.15480022E-4*T^1-7.90252856E-8*T^2+4.11702505E-11*T^3-7.43864331E-15*T^4}
      cs: Analytic | expr = sqrt(1.4*287*T); args = T; dermethod = manual; argders = {T, d(sqrt(1.4*287*T),T)}
    RefractiveIndex
      n = 1
      ki = 0

Physics
  es: Electrostatics on all domains
    dependent variable V
    ccn1: ChargeConservation (default)
    zc1: ZeroCharge (default)
    init1: init "Initial Values 1" (default)
    pot1: ElectricPotential on boundaries 5-8
    pot2: ElectricPotential on boundaries 2 | V0 = U
  mf: InductionCurrents "Magnetic Fields" on all domains
    dependent variable A = {Ax, Ay, Az}
    al1: AmperesLaw "Ampère's Law 1" (default)
    mi1: MagneticInsulation (default)
    init1: init "Initial Values 1" (default)
    scu1: SurfaceCurrent on boundaries 5-8 | Js0 = {0, 0, I/(pi*d)}
    mp1: MagneticPotential on boundaries 2

Mesh
  mesh1 "Mesh 1" (physics-controlled)
    size: MeshSizeDefault | hauto = 5

Studies
  std1 "Study 1"
    param: Parametric "Parametric Sweep" | pname = H; plistarr = range(d*2,1[mm],20[mm])
    stat: Stationary

Solver configurations
  sol1 "Solver 1" (study std1)
    v1: Variables "Dependent Variables 1"
    s1: Stationary "Stationary Solver 1"
      dDef: Direct
      fc1: FullyCoupled
  sol2 "Parametric 2" (study std1)

Datasets
  dset1: Solution | solution = sol1
  dset2: Solution "Probe Solution 2" | solution = sol1
  int1: Integral "Domain Probe 1" on domains 1 | data = dset2
  int2: Integral "Domain Probe 2" on domains 1 | data = dset2
  dset3: Solution | solution = sol2

Derived values
  pev1: EvalPoint "Domain Probe 1" | data = int1; table = tbl1; expr = es.We
  pev2: EvalPoint "Domain Probe 2" | data = int2; table = tbl1; expr = mf.Wm

Tables
  tbl1: Table "Probe Table 1"
    H | Electric energy density (J/m), Domain Probe 1 | Magnetic energy density (J/m), Domain Probe 2
    0.002 | 1.38929e-11 | 1.85628e-07
    0.003 | 1.14704e-11 | 2.3193e-07
    0.004 | 1.02567e-11 | 2.69285e-07
    0.005 | 9.44628e-12 | 2.91988e-07
    0.006 | 8.84456e-12 | 3.11558e-07
    0.007 | 8.44064e-12 | 3.26361e-07
    0.008 | 8.0806e-12 | 3.40748e-07
    0.009 | 7.79737e-12 | 3.53035e-07
    0.01 | 7.64197e-12 | 3.60704e-07
    0.011 | 7.39319e-12 | 3.72274e-07
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
Plots
  pg1: PlotGroup2D "Electric Potential (es)" | data = dset1
    surf1: Surface | expr = V
  pg2: PlotGroup2D "Magnetic Flux Density Norm (mf)" | data = dset1
    surf1: Surface | expr = mf.normB
  pg3: PlotGroup1D "Probe 1D Plot Group 3"
    tblp1: Table "Probe Table Graph 1" | table = tbl1; plotcolumns = 2
  pg4: PlotGroup2D "Electric Potential (es) 1" | data = dset3
    surf1: Surface | expr = V
    arws1: ArrowSurface
      expr = {es.Ex, es.Ey}
      arrowxmethod = coord
      xcoord = range(-0.01,0.0010,0.01)
      arrowymethod = coord
      ycoord = range(-0.01,0.0010,0.01)
      arrowlength = normalized
  pg5: PlotGroup2D "Magnetic Flux Density Norm (mf) 1" | data = dset3
    surf1: Surface | expr = mf.normB
    arws1: ArrowSurface
      expr = {mf.Bx, mf.By}
      arrowxmethod = coord
      xcoord = range(-0.01,0.0010,0.01)
      arrowymethod = coord
      ycoord = range(-0.01,0.0010,0.01)
      arrowlength = normalized

Exports
  tbl1: Table | table = tbl1; filename = C:\Users\SSS\Documents\TTY_WTL\WOFP.txt
  img1: Image2D "2D Image 1"
    size = manual
    unit = px
    width = 800
    height = 600
    pngfilename = /home/alexey/Documents/TTY/Transmission Lines & Waveguides/Study/WAGP_Flux.png
    options = off
    axes = on
  img2: Image2D "2D Image 2"
    size = manual
    unit = px
    width = 800
    height = 600
    pngfilename = /home/alexey/Documents/TTY/Transmission Lines & Waveguides/Study/WAGP_EField.png
    options = off
    axes = on