// COMSOL Multiphysics 4.3.2.189 model "coax_air.mph"
// Outline of the model tree

Parameters
  r = 1[mm]
  R = 2[mm]
  L = 20[mm]
  f = 11[GHz]
  la = c_const/f
  hmax = 0.2*la
  Z = Z0_const/(2*pi) * log(R/r)

Geometry
  geom1 "Geometry 1" (3D, length unit m)
    cyl1: Cylinder | pos = {1, 0, 0}; r = R; h = L
    cyl2: Cylinder | pos = {1, 0, 0}; r = r; h = L
    dif1: Difference | input = cyl1; input2 = cyl2
    fin: Finalize "Form Union"

Materials
  mat2 "Glass (quartz)" on no domains
    def "Basic"
      relpermeability = 1
      electricconductivity = 1e-14[S/m]
      relpermittivity = 4.2
      density = 2200[kg/m^3]
      thermalconductivity = 1.1[W/(m*K)]
      heatcapacity = 480[J/(kg*K)]
    RefractiveIndex
      n = 1.5
      ki = 0
    Enu "Young's modulus and Poisson's ratio"
      youngsmodulus = 74e9[Pa]
      poissonsratio = 0.3
  mat3 "American red oak" on domains 1
    def "Basic"
      relpermeability = 1
      electricconductivity = 2.857e-18[S/m]
      thermalexpansioncoefficient = 4.9e-6[1/K]
      relpermittivity = 2
      density = 630[kg/m^3]
    Enu "Young's modulus and Poisson's ratio"
      youngsmodulus = 12.4e9[Pa]
      poissonsratio = 0.3

Physics
  emw: ElectromagneticWaves "Electromagnetic Waves, Frequency Domain" on all domains
    dependent variable E = {Ex, Ey, Ez}
    wee1: WaveEquationElectric (default)
    pec1: PerfectElectricConductor (default)
    init1: init "Initial Values 1" (default)
    lport1: LumpedPort on boundaries 3 | PortName = in; PortType = Coaxial; TerminalType = Circuit
    lport2: LumpedPort on boundaries 4 | PortType = Coaxial; TerminalType = Circuit
  cir: Circuit "Electrical Circuit"
    dependent variable voltages
    gnd1: GroundNode
    R1: Resistor | R = Z; Connections = {1, 2}
    V1: VoltageSource | sourceType = AC
    R2: Resistor | R = Z; Connections = {3, 0}
    IvsU1: ModelDeviceIV "External I Vs. U 1" | V_src = root.mod1.emw.Vport_in; Connections = {2, 0}
    IvsU2: ModelDeviceIV "External I Vs. U 2" | V_src = root.mod1.emw.Vport_1; Connections = {3, 0}

Mesh
  mesh1 "Mesh 1"
    size: MeshSizeDefault | hmax = hmax; hauto = 4
    ftet1: FreeTet "Free Tetrahedral 1" on remaining entities
      xscale = 1
      yscale = 1
      smoothcontrol = on
      smoothmaxiter = 4
      smoothmaxdepth = 4
      zscale = 1

Studies
  std1 "Study 1"
    freq: Frequency "Frequency Domain" | plist = f

Solver configurations
  sol1 "Solver 1" (study std1)
    v1: Variables "Dependent Variables 1"
    s1: Stationary "Stationary Solver 1"
      p1: Parametric | pname = freq; plistarr = f
      i1: Iterative | linsolver = bicgstab
        mg1: Multigrid
      fc1: FullyCoupled

Datasets
  dset1: Solution | solution = sol1

Plots
  pg1: PlotGroup3D "Electric Field (emw)" | data = dset1
    mslc1: Multislice | expr = emw.Qh