// COMSOL Multiphysics 4.3.2.189 model "ribbon_2.mph"
// Outline of the model tree

Parameters
  thickness = 0.2[mm]
  dist = 4[mm]
  radius = 0.5[mm]
  voltage = 1[V]
  I = 10[A]

Probes
  dom1: Domain "Domain Probe 1" on all domains | type = integral; expr = es.We; table = tbl1
  dom2: Domain "Domain Probe 2" on all domains | expr = mf.Wm; table = tbl1

Geometry
  geom1 "Geometry 1" (2D, length unit m)
    sq1: Square | base = center; size = 50[cm]
    c1: Circle | pos = {0 - dist/2.0, 0}; r = radius
    c2: Circle | pos = {0 + dist/2.0, 0}; r = radius
    c3: Circle | pos = {0 - dist/2.0, 0}; r = radius + thickness
    c4: Circle | pos = {0 + dist/2.0, 0}; r = radius + thickness
    r1: Rectangle | base = center; size = {dist - radius*2, radius}
    dif1: Difference | input = c3, c4, r1, sq1; input2 = c1, c2
    fin: Finalize "Form Union"

Materials
  mat1 "Air" on domains 1
    def "Basic"
      relpermeability = 1
      relpermittivity = 1
      dynamicviscosity = eta(T[1/K])[Pa*s]
      ratioofspecificheat = 1.4
      electricconductivity = 0[S/m]
      heatcapacity = Cp(T[1/K])[J/(kg*K)]
      density = rho(pA[1/Pa],T[1/K])[kg/m^3]
      thermalconductivity = k(T[1/K])[W/(m*K)]
      soundspeed = cs(T[1/K])[m/s]
      eta: Piecewise | arg = T; extrap = constant; pieces = {200.0, 1600.0, -8.38278E-7+8.35717342E-8*T^1-7.69429583E-11*T^2+4.6437266E-14*T^3-1.06585607E-17*T^4}
      Cp: Piecewise | arg = T; extrap = constant; pieces = {200.0, 1600.0, 1047.63657-0.372589265*T^1+9.45304214E-4*T^2-6.02409443E-7*T^3+1.2858961E-10*T^4}
      rho: Analytic | expr = pA*0.02897/8.314/T; args = {pA, T}; dermethod = manual; argders = {{pA, d(pA*0.02897/8.314/T,pA)}, {T, d(pA*0.02897/8.314/T,T)}}
      k: Piecewise | arg = T; extrap = constant; pieces = {200.0, 1600.0, -0.00227583562+1.15480022E-4*T^1-7.90252856E-8*T^2+4.11702505E-11*T^3-7.43864331E-15*T^4}
      cs: Analytic | expr = sqrt(1.4*287*T); args = T; dermethod = manual; argders = {T, d(sqrt(1.4*287*T),T)}
    RefractiveIndex
      n = 1
      ki = 0
  mat2 "Material 2" on domains 2-6
    def "Basic"
      electricconductivity = 0.000001
      relpermeability = 2.25
      relpermittivity = 1

Physics
  es: Electrostatics on all domains
    dependent variable V
    ccn1: ChargeConservation (default)
    zc1: ZeroCharge (default)
    init1: init "Initial Values 1" (default)
    pot1: ElectricPotential on boundaries 17, 18, 20, 21 | V0 = voltage
    pot2: ElectricPotential on boundaries 29, 30, 32, 33
  mf: InductionCurrents "Magnetic Fields" on all domains
    dependent variable A = {Ax, Ay, Az}
    al1: AmperesLaw "Ampère's Law 1" (default)
    mi1: MagneticInsulation (default)
    init1: init "Initial Values 1" (default)
    scu1: SurfaceCurrent on boundaries 29, 30, 32, 33 | Js0 = {0, 0, I}
    mp1: MagneticPotential on boundaries 17, 18, 20, 21

Mesh
  mesh1 "Mesh 1" (physics-controlled)
    size: MeshSizeDefault | hauto = 5

Studies
  std1 "Study 1"
    stat: Stationary

Solver configurations
  sol1 "Solver 1" (study std1)
    v1: Variables "Dependent Variables 1"
    s1: Stationary "Stationary Solver 1"
      dDef: Direct
      fc1: FullyCoupled

Datasets
  dset1: Solution | solution = sol1
  dset2: Solution "Probe Solution 2" | solution = sol1
  int1: Integral "Domain Probe 1" on domains 1-6 | data = dset2
  avh1: Average "Domain Probe 2" on domains 1-6 | data = dset2

Derived values
  pev1: EvalPoint "Domain Probe 1" | data = int1; table = tbl1; expr = es.We
  pev2: EvalPoint "Domain Probe 2" | data = avh1; table = tbl1; expr = mf.Wm

Tables
  tbl1: Table "Probe Table 1"
    Electric energy density (J/m), Domain Probe 1
    6.73969e-12

Plots
  pg1: PlotGroup2D "Electric Potential (es)" | data = dset1
    surf1: Surface | expr = es.normE; wireframe = off
  pg2: PlotGroup2D "Magnetic Flux Density Norm (mf)" | data = dset1
    surf1: Surface | expr = mf.W
  pg3: PlotGroup1D "Probe 1D Plot Group 3"
    tblp1: Table "Probe Table Graph 1" | table = tbl1; plotcolumns = 1